// COMSOL Multiphysics 5.4.0.208 model "cylinder_flow.mph"
// Flow Past a Cylinder
// This example simulates the time-dependent flow past a cylinder. The Reynolds number is about 100 which is small enough for the flow to stay laminar, but high enough for a von Karman vortex street to form.
// Outline of the model tree

Parameters
  U_mean = 1[m/s]  // Mean inflow velocity

Functions
  step1: Step | location = 0.1

Geometry
  geom1 "Geometry 1" (2D, length unit m)
    r1: Rectangle | size = {2.2, 0.4}
    c1: Circle | pos = {0.2, 0.2}; r = 0.05
    dif1: Difference | input = r1; input2 = c1
    fin: Finalize "Form Union"

Materials
  mat1: Common "Material 1" on all domains
    def "Basic"
      density = 1
      dynamicviscosity = 1e-3

Physics
  spf: LaminarFlow on all domains
    dependent variable u = {u, v, w}
    fp1: FluidProperties (default)
    init1: init "Initial Values 1" (default)
    wallbc1: WallBC "Wall 1" (default)
    inl1: InletBoundary "Inlet 1" on boundaries 1 | U0in = U_mean*6*s*(1-s)*step1(t[1/s])
    out1: OutletBoundary "Outlet 1" on boundaries 4

Mesh
  mesh1 "Mesh 1" (physics-controlled)
    size: MeshSizeDefault | table = cfd; hauto = 4

Studies
  std1 "Study 1"
    time: Transient "Time Dependent" | tlist = range(0,0.2,3.4) range(3.5,0.02,7)

Solver configurations
  sol1 "Solution 1" (study std1)
    v1: Variables "Dependent Variables 1"
    t1: Time "Time-Dependent Solver 1"
      tlist = range(0,0.2,3.4) range(3.5,0.02,7)
      rtol = 0.005
      atolglobalfactor = 0.05
      atolmethod = {comp1_p, scaled, comp1_u, global}
      atolvaluemethod = {comp1_p, factor, comp1_u, factor}
      atolfactor = {comp1_p, 1, comp1_u, 0.1}
      tstepsbdf = intermediate
      maxorder = 2
      stabcntrl = on
      bwinitstepfrac = 0.01
      estrat = exclude
      fc1: FullyCoupled
        linsolver = d1
        maxiter = 8
        ntolfact = 0.5
        damp = 0.9
        jtech = once
        stabacc = aacc
        aaccdim = 5
        aaccmix = 0.9
        aaccdelay = 1
      d1: Direct | linsolver = pardiso; pivotperturb = 1.0E-13

Datasets
  dset1: Solution | solution = sol1
  int1: Integral on boundaries 5-8 | data = dset1

Plots
  pg1: PlotGroup2D "Velocity (spf)" | data = dset1
    surf1: Surface | expr = spf.U
    ptr1: ParticleMass "Particle Tracing with Mass 1"
      mass = 4*pi/3*1e-9
      velstartx = u
      velstarty = v
      xcoord = 0
      ycoord = range(0.1,0.05,0.3)
      dropmethod = freq
      tstart = 3.6
      dropfreq = 0.4
      linetype = none
      pointtype = point
      pointdom = disappear
  pg2: PlotGroup2D "Pressure (spf)" | data = dset1
    con1: Contour | expr = p
  pg3: PlotGroup1D "1D Plot Group 3" | data = int1
    ptgr1: PointGraph | expr = (-reacf(v)[N]*2/(spf.rho*U_mean^2*0.1[m^2]))[1/m]; unit = 1; descr = Lift coefficient
  pg4: PlotGroup1D "1D Plot Group 4" | data = int1
    ptgr1: PointGraph | expr = (-reacf(u)[N]*2/(spf.rho*U_mean^2*0.1[m^2]))[1/m]; unit = 1; descr = Drag coefficient